# Flexible granular chain simulation in LAMMPS

units       si
atom_style hybrid sphere angle
boundary    f f f

# special_bonds none

# Read the atom and bond data from the data file.
# read_data chain_datas/chain.data
read_data chain_datas/N4_chain.data
# read_data chain_datas/N4_chain.data

# Ensure spherical properties are consistent (overrides data if needed)
# mm
# set type 1 diameter 0.002
# kg/m3
# set type 1 density 708.47
velocity all set 0.0 0.0 0.0

# 1. Read the restart file instead of the data file
read_restart post_chain_flop/current/restart.final.bin

# Pin the first three beads in space (anchor group) and integrate only the rest
group anchors id 1 2
group mobile subtract all anchors

velocity anchors set 0.0 0.0 0.0
set group anchors omega 0.0 0.0 0.0

# Ensure a predictable output directory and set outdir
variable outdir string post_chain_flop/current

variable r_max equal 0.003 #center to center
# Theta limit in Radians (140 degrees * PI / 180)
variable theta_lim equal 2.44346
# Stiffnesses
variable knt2   equal 1.0e8  # High stiffness for bond limit
variable ktheta equal 1.0e8   # Stiffness for angle limit
# smoothing widths (tune as needed)
variable w   equal 1.0e-5    # smoothing length (m)
variable delta equal 0.05    # smoothing angle (rad) ~ 1.15 deg

# Apply gravity perpendicular to the chain (chain aligned with +z, gravity along +x)
fix grav mobile gravity 9.81 vector 1 0 0
# --- WALL DEFINITIONS ---
# You must define X, Y, and Z walls separately.

# 1. X-Walls (Left and Right: -0.02 to 0.02)
fix xwalls all wall/gran granular hertz/material 1.0e8 0.3 5e-4 &
    tangential linear_history 300.0 1.0 0.1 &
    rolling sds 200.0 100.0 0.1 &
    twisting marshall &
    xplane -0.02 0.02

# 2. Y-Walls (Front and Back: -0.01 to 0.01)
fix ywalls all wall/gran granular hertz/material 1.0e8 0.3 5e-4 &
    tangential linear_history 300.0 1.0 0.1 &
    rolling sds 200.0 100.0 0.1 &
    twisting marshall &
    yplane -0.01 0.01

# 3. Z-Walls (Floor and Ceiling: 0.00 to 0.08)
fix zwalls all wall/gran granular hertz/material 1.0e8 0.3 5e-4 &
    tangential linear_history 300.0 1.0 0.1 &
    rolling sds 200.0 100.0 0.1 &
    twisting marshall &
    zplane 0.00 0.08

comm_modify    vel yes cutoff 0.004

# define particle - particle interactions
pair_style      granular
pair_coeff  1 1 hertz/material 1.0e8 0.30 5.0e4 &
            tangential linear_history 8.0e10 5.0e3 0.40 &
            rolling sds 1.0e4 5.0e3 0.30 &
            twisting marshall

# BOND: Lepton
# If r > r_max (0.003): Apply harmonic penalty k/2 * (r - r_max)^2
# If r <= r_max: Force is 0 (slack chain)
# Note: Repulsion for r < 0.002 is handled by pair_style granular, not this bond.
bond_style lepton no_offset
# bond_coeff 1 1.0 "0.5 * knt2 * (r - r_max)^2 * step(r - r_max); knt2=v_knt2; r_max=v_r_max"
bond_coeff 1 1.0 "0.5 * knt2 * (r - r_max)^2 * 0.5 * (1 + tanh((r - r_max)/w)); knt2=v_knt2; r_max=v_r_max; w=v_w"

# ANGLE: Lepton
# theta variable is in Radians.
# If theta < theta_lim: Apply harmonic penalty k/2 * (theta - theta_lim)^2
# If theta >= theta_lim: Force is 0 (free bending)
angle_style lepton no_offset
# angle_coeff 1 1.0 "0.5 * ktheta * (theta - t_lim)^2 * step(t_lim - theta); ktheta=v_ktheta; t_lim=v_theta_lim"
angle_coeff 1 1.0 "0.5 * ktheta * (theta - t_lim)^2 * 0.5 * (1 + tanh((t_lim - theta)/w_a)); ktheta=v_ktheta; t_lim=v_theta_lim; w_a=v_delta"

# Use the standard NVE integrator for the mobile beads only.
fix integr mobile nve/sphere

# Set up neighbor list parameters (wider skin and higher per-atom quota prevent overflow)
neighbor 0.005 bin
neigh_modify delay 0 every 1 check yes

# Set a conservative timestep for the stiff bonded chain.
timestep 1.0e-9

# === 4. OUTPUTS & RUN ===
# Output thermodynamic data every 1000 timesteps.
thermo 1000
thermo_style custom step pe ke etotal press

# Output a dump file of the sphere coordinates for visualization (e.g., in ParaView)
dump 1 all custom 10000 ${outdir}/chain_*.dump id type x y z vx vy vz fx fy fz diameter mass
dump_modify 1 sort id

# Save a binary restart file every 1,000,000 steps
# The '*' is replaced by the timestep number
restart 1000000 ${outdir}/restart.*.bin

run 10000000

# Save the final state manually
write_restart ${outdir}/restart.final.bin

variable outdir delete
