# Sequential granular chain drop and settling simulation (Resume Stage)
# Automatically generated by Generalized Engine

units       si
atom_style hybrid sphere angle
boundary    f f f

# Load restart binary
read_restart {{resume_file}}

# Physics & Potential
fix 1 all gravity 9.81 vector 0 0 -1
include {{includes_lepton_inc}}

# Setup wall / funnel definitions if any
include {{includes_setup_inc}}

# Settings
neighbor 0.01 bin
neigh_modify delay 0 every 10 check yes
timestep {{dt}}

group chain_particles dynamic all
fix 2 all viscous {{viscosity}}

# Standard NVE integration
fix 3 all nve/sphere

# Include dumping profiles
include {{includes_dump_inc}}

# Periodic restart settings
restart 100000 {{outdir}}/restart/restart.*.bin

# Run remaining steps
run {{relax_steps}}

# Save final state data
write_data {{outdir}}/final_hopper.data
write_restart {{outdir}}/restart/restart.final.bin
