# Flexible granular chain simulation in LAMMPS

units       si
atom_style hybrid sphere angle
boundary    f f f

# 1. READ RESTART
# Point this to the specific file you want to resume from
read_restart ${resume_file}

# 3. RE-DEFINE GROUPS (Groups are usually saved, but good practice to ensure)
group anchors id 1 2
group mobile subtract all anchors

# 2. RE-DEFINE VARIABLES (Crucial: Variables are not saved in restart files)
variable r_max equal 0.0005 #pot center to center
# Theta limit in Radians (140 degrees * PI / 180)
variable theta_lim equal 2.4435
# Stiffnesses
variable knt2   equal 1.0e6  # High stiffness for bond limit
variable ktheta equal 1.0e6   # Stiffness for angle limit
# smoothing widths (tune as needed)
variable w   equal 1.0e-4    # smoothing length (m) 0.1 mm
variable delta equal 1.0e-4    # smoothing angle (rad) ~ 1.15 deg

# Granular parameters
variable k_n equal 1e6
variable nu_n0 equal 50.0
variable k_roll equal 1.0e6
variable gamma_roll equal 5000
variable mu_roll equal 0.3
variable k_t equal 1.0e6
variable x_gamma_t equal 1.0
variable mu_s equal 0.3

# 4. RE-DEFINE FORCE FIELD (Coeffs are saved, but Lepton needs variables)
pair_style  granular
pair_coeff  1 1 hooke 1e6 50.0 &
            tangential linear_history 1.0e6 1.0 0.3 &
            rolling sds 1.0e6 5000 0.3 &
            twisting marshall

bond_style lepton no_offset
bond_coeff 1 0.003 "0.5 * knt2 * (r - r_max)^2 * 0.5 * (1 + tanh((r - r_max)/w)); knt2=v_knt2; r_max=v_r_max; w=v_w"

angle_style lepton no_offset
angle_coeff 1 0 "0.5 * ktheta * (theta - t_lim)^2 * 0.5 * (1 + tanh((t_lim - theta)/w_a)); ktheta=v_ktheta; t_lim=v_theta_lim; w_a=v_delta"

# 5. RE-DEFINE FIXES (Not saved in restart)
fix grav mobile gravity 9.81 vector 1 0 0

group chain_particles type 1
fix 1 chain_particles viscous ${viscosity}

comm_modify vel yes cutoff 0.004

# Use the standard NVE integrator for the mobile beads only.
fix integr mobile nve/sphere

# 6. SETTINGS
neighbor 0.004 bin
neigh_modify delay 0 every 1 check yes

# Set a conservative timestep for the stiff bonded chain.
timestep ${dt}

# Re-define computes
compute 1 chain_particles bond/local dist engpot force
compute 2 chain_particles angle/local theta eng

thermo 10000
thermo_style custom step pe ke ebond eangle etotal ecoul emol edihed epair evdwl

# Dumps (Note: 'append yes' is not strictly needed if filenames have step numbers,
# but good if you use single filenames)
dump 1 all custom 1000 ${outdir}/chain/chain_*.dump id type x y z vx vy vz fx fy fz diameter mass
dump_modify 1 sort id
dump 2 all local 1000 ${outdir}/bond/bond_*.dump index c_1[1] c_1[2] c_1[3]
dump_modify 2 colname 2 dist
dump_modify 2 colname 3 energy
dump_modify 2 colname 4 force

dump 3 all local 1000 ${outdir}/angle/angle_*.dump index c_2[1] c_2[2]
dump_modify 3 colname 2 theta
dump_modify 3 colname 3 energy

# Restart settings
restart 100000 ${outdir}/restart/restart.*.bin

# 8. RUN
# Run for another 10 million steps
run ${run_steps}

# Save the final state manually
write_restart ${outdir}/restart/restart.final.bin

variable outdir delete
