# LAMMPS Grid-Based Batch Hopper Filling Template
# Automatically generated by Generalized Engine

units       si
atom_style hybrid sphere angle
boundary    f f f

comm_modify vel yes cutoff 0.02
special_bonds lj/coul 1.0 1.0 1.0

# Define boundaries dynamically based on hopper layout
variable pad equal 2.0
variable grid_nx equal ceil(sqrt({{n_hoppers}}))
variable grid_ny equal ceil({{n_hoppers}}/${grid_nx})
variable box_x equal (${grid_nx}*{{spacing}}+${pad})
variable box_y equal (${grid_ny}*{{spacing}}+${pad})
variable box_z equal ({{z_max}}+${pad})

region sim_box block -${pad} ${box_x} -${pad} ${box_y} -${pad} ${box_z}
create_box 2 sim_box bond/types 1 angle/types 1 extra/bond/per/atom 2 extra/angle/per/atom 1 extra/special/per/atom 10

# Physics & Potential
fix 1 all gravity 9.81 vector 0 0 -1
include {{includes_lepton_inc}}

# Load Replicated Geometry (Regions & Fixes)
include {{includes_geometry_inc}}

# Load Molecule Definitions
include {{includes_mol_include_file}}

# Neighbors & Timestep settings
neighbor 0.005 bin
atom_modify sort 0 0.0
neigh_modify delay 0 every 10 check yes one 10000
timestep {{dt}}

# Insertion Script
include {{includes_insertion_file}}

group chain_particles type 1
group hopper_walls type 2

# Langevin integration settings (hoppers remain fixed)
fix 2 chain_particles viscous {{viscosity}}
fix 3 chain_particles nve/sphere
fix 2D chain_particles setforce 0 NULL NULL

# Include dumping profiles
include {{includes_dump_inc}}
restart 200000 {{outdir}}/restart/restart.*.bin

# Run settling/relaxation
run {{relax_steps}}

# Save final state data
write_data {{outdir}}/final_grid.data
write_restart {{outdir}}/restart/restart.final.bin
