# LAMMPS Grid-Based Batch Hopper Flow Template (Start Stage)
# Automatically generated by Generalized Engine

units       si
atom_style hybrid sphere angle
boundary    f f f

comm_modify vel yes cutoff 0.02
special_bonds lj/coul 1.0 1.0 1.0

# Load final restart binary from the Hopper Filling phase
read_restart {{resume_file}}

# Physics & Potential (Re-apply after restart)
fix 1 all gravity 9.81 vector 0 0 -1
include {{includes_lepton_inc}}

# Load Flow Geometry (Active Walls with Oscillating Boundaries, no lids)
include {{includes_geometry_inc}}

# Settings
neighbor 0.005 bin
neigh_modify delay 0 every 10 check yes one 10000
atom_modify sort 0 0.0
timestep {{dt}}

group chain_particles type 1
group hopper_walls type 2

# Langevin integration settings
fix 2 chain_particles viscous {{viscosity}}
fix 3 chain_particles nve/sphere
fix 2D chain_particles setforce 0 NULL NULL

# Include dumping profiles
include {{includes_dump_inc}}
restart 100000 {{outdir}}/restart/restart.*.bin

# Run flow simulation
run {{run_steps}}

# Save final state data
write_data {{outdir}}/final_grid_flow.data
write_restart {{outdir}}/restart/restart.final.bin
