# Resume hopper-fill template: read restart, continue filling/relaxing
# Expects variables: outdir, mol_include_file, n_templates, n_fill, drop_steps,
# relax_steps, dt, seed, lepton_inc, resume_file, viscosity

units       si
atom_style hybrid sphere angle
boundary    f f f

# 1. READ RESTART
# This must be the first command after units/atom_style/boundary
read_restart ${resume_file}

# 2. POTENTIALS
# Re-declare the pair/bond/angle styles used in the simulation
include ${lepton_inc}
# Dynamic timestep based on Lepton smoothing width 'w'
# fix 5 all dt/reset 1 ${dt} 1e-04 ${w} units box

# 3. GEOMETRY & WALLS
# Re-declare regions and fix wall/gran/region (not saved in restart)
include ${setup_inc}

# 4. MOLECULES
# Re-declare molecule templates for use in create_atoms
include ${mol_include_file}

# 5. GROUPS & DYNAMIC STUFF
# Sim box for dynamic grouping (consistent with in.hopper_fill)
region sim_box block -0.5 0.5 -0.25 0.25 -0.1 0.6
group chain_particles dynamic all region sim_box

# 6. FIXES (RE-DECLARATION)
# Fixes are cleared upon read_restart, so we must re-define them
fix 1 all gravity 9.81 vector 0 0 -1
fix 2 all viscous ${viscosity}
fix 3 all nve/sphere

# 7. SETTINGS
# Neighbors and communication settings
neighbor 0.01 bin
neigh_modify delay 0 every 1 check yes
comm_modify vel yes cutoff 0.01
timestep ${dt}

# 8. OUTPUT
include ${dump_inc}


# --- Grid Insertion Logic (Resume Mode) ---
# Exclusion zone diameter in meters: 3 * (atoms per chain) * 1mm
variable chain_size equal ${N}           # IMPORTANT: Set to your actual chain size
variable max_batch_size equal 20      # Cap for stability

variable ex_diam equal 3*${chain_size}*0.001
variable time_gap equal 2*sqrt(${ex_diam}/9.81)
variable drop_steps equal floor(${time_gap}/${dt})

variable z_drop equal 0.55
variable drop_time equal sqrt(${z_drop}/9.81)
variable finish_drop_steps equal floor(${drop_time}/${dt})

variable x_f_min equal -0.08
variable x_f_max equal 0.08
variable x_width equal ${x_f_max}-${x_f_min}
variable y_f_min equal -0.15
variable y_f_max equal 0.15
variable y_width equal ${y_f_max}-${y_f_min}

# Calculate available grid cells
variable nx equal floor((${x_width})/${ex_diam})
variable ny equal floor((${y_width})/${ex_diam})
variable grid_total equal ${nx}*${ny}

# Determine batch size (capped) using compatible if/then logic
variable batch_size equal ${grid_total}
if "${grid_total} > ${max_batch_size}" then &
    "variable batch_size equal ${max_batch_size}"

# Re-calculate grid spacing based on actual batch size to spread them out
variable nx_b equal floor( sqrt( ${batch_size} * ${x_width} / ${y_width} ) )
# Ensure nx_b is at least 1
variable nx_f equal ${nx_b}
if "${nx_b} == 0" then "variable nx_f equal 1"

variable ny_f equal floor( ${batch_size} / ${nx_f} )
# actual_batch is limited by our grid math
variable actual_batch equal ${nx_f}*${ny_f}

variable dx equal (${x_f_max}-${x_f_min})/${nx_f}
variable dy equal (${y_f_max}-${y_f_min})/${ny_f}

print ">>> Multi-chain Pour Configuration (Resume) <<<"
print ">>> Exclusion Diameter: ${ex_diam} m"
print ">>> Batch Grid: ${nx_f} x ${ny_f} (${actual_batch} chains per drop)"
print ">>> Drop Steps: ${drop_steps}"

restart ${drop_steps} ${outdir}/restart/restart.*.bin

run 0

# 9. CONTINUE FILL LOOP (now stepping by actual_batch)
# Integer math for ceil(N_FILL / ACTUAL_BATCH):
variable n_loops equal floor( (${n_fill} + ${actual_batch} - 1) / ${actual_batch} )
variable i loop ${n_loops}
label loop_start

    # --- Uniform Distribution Logic ---
    # Generate batch-wide random offsets to shift the entire grid.
    # We use $() immediate evaluation to "lock" the offset for the duration of this batch.
    variable batch_seed equal ${seed}+${i}
    variable ox equal $(random(0.0,v_dx,v_batch_seed))
    variable oy equal $(random(0.0,v_dy,v_batch_seed))

    # Batch insertion sub-loop
    variable ix loop ${nx_f}
    label x_loop
        variable iy loop ${ny_f}
        label y_loop
            variable r equal floor(random(1,${n_templates}+1,${seed}))
            variable mol_id string m${r}

            # Calculate wrapped position
            # We shift the grid center by ox/oy and wrap around if it exceeds bounds.
            # Using ${ix} to bake the current loop index into the formula evaluation.
            variable px_raw equal v_x_f_min+(${ix}-0.5)*v_dx+v_ox
            variable py_raw equal v_y_f_min+(${iy}-0.5)*v_dy+v_oy

            # Wrap logic using logical multiplication (safe alternative to ternary operator)
            # (A > B) returns 1.0 if true, 0.0 if false.
            variable px equal v_px_raw-(v_px_raw>v_x_f_max)*v_x_width
            variable py equal v_py_raw-(v_py_raw>v_y_f_max)*v_y_width

            create_atoms 0 single ${px} ${py} 0.55 mol ${mol_id} ${seed}

            next iy
            jump SELF y_loop
        next ix
        jump SELF x_loop

    run ${drop_steps}
    next i
jump SELF loop_start

restart 100000 ${outdir}/restart/restart.*.bin

run ${finish_drop_steps}

# 10. FINAL RELAXATION
run ${relax_steps}

# 11. SAVE STATE
write_data ${outdir}/final_hopper_resume.data
write_restart ${outdir}/restart/restart.fill.resume.bin
