# 3D Relaxation of granular chain using Langevin dynamics

units       si
atom_style hybrid sphere angle
boundary    f f f

comm_modify vel yes cutoff 0.004
special_bonds lj/coul 1.0 1.0 1.0

# Variables passed from runner:
# outdir, data_file, seed, run_steps, dt, temperature

# Default temperature if not set (approx 1e12 K for macroscopic particles)
if "${temperature} == 0" then "variable temperature equal 1e12"

read_data ${data_file}

# Initialize velocities
velocity all create ${temperature} ${seed} dist gaussian

# --- FORCE FIELD (Same as chain_flop) ---
include ${lepton_inc}
# --- INTEGRATION ---
# NVE integration for movement
fix 1 all nve/sphere

# Langevin thermostat for randomization (Brownian motion)
# temp start, temp stop, damp parameter (time units)
# damp should be around 100-1000 timesteps
variable damp equal 1000*${dt}
fix 2 all langevin ${temperature} ${temperature} ${damp} ${seed} omega yes

neighbor 0.004 bin
neigh_modify delay 0 every 1 check yes

timestep ${dt}

thermo 1000
thermo_style custom step pe ke etotal temp

run ${run_steps}

# Write the final state
write_data ${outdir}/relaxed_chain.data
