# Test LAMMPS input script generated by Generalized Engine Stage 2 (Resume)
# Resuming from {{resume_file}}
# Target steps: {{run_steps}}

units       si
atom_style hybrid sphere angle
boundary    f f f

# Mock restart read
print "Mock read_restart from {{resume_file}}"

# Run steps
print "Running resume steps for {{run_steps}} steps..."

# Simulate dump file creation
shell mkdir -p {{outdir}}/chain
shell touch {{outdir}}/chain/chain_150000.dump

# Simulate final restart binary creation
shell mkdir -p {{outdir}}/restart
shell touch {{outdir}}/restart/restart.final.bin
